<Lems>
<!--
    This LEMS file has been generated by org.neuroml.importer.sbml.SBMLImporter (see https://github.com/NeuroML/org.neuroml.import)
         org.neuroml.import  v1.0.9
         org.neuroml.model   v1.0.7
         jLEMS               v0.9.5.2
-->

    <Dimension name="time" m="0" l="0" t="1" i="0" k="0" n="0" j="0"/>
    <Dimension name="per_time" m="0" l="0" t="-1" i="0" k="0" n="0" j="0"/>
    <Dimension name="voltage" m="1" l="2" t="-3" i="-1" k="0" n="0" j="0"/>
    <Dimension name="per_voltage" m="-1" l="-2" t="3" i="1" k="0" n="0" j="0"/>
    <Dimension name="conductance" m="-1" l="-2" t="3" i="2" k="0" n="0" j="0"/>
    <Dimension name="conductanceDensity" m="-1" l="-4" t="3" i="2" k="0" n="0" j="0"/>
    <Dimension name="capacitance" m="-1" l="-2" t="4" i="2" k="0" n="0" j="0"/>
    <Dimension name="specificCapacitance" m="-1" l="-4" t="4" i="2" k="0" n="0" j="0"/>
    <Dimension name="resistance" m="1" l="2" t="-3" i="-2" k="0" n="0" j="0"/>
    <Dimension name="resistivity" m="2" l="2" t="-3" i="-2" k="0" n="0" j="0"/>
    <Dimension name="charge" m="0" l="0" t="1" i="1" k="0" n="0" j="0"/>
    <Dimension name="charge_per_mole" m="0" l="0" t="1" i="1" k="0" n="-1" j="0"/>
    <Dimension name="current" m="0" l="0" t="0" i="1" k="0" n="0" j="0"/>
    <Dimension name="currentDensity" m="0" l="-2" t="0" i="1" k="0" n="0" j="0"/>
    <Dimension name="length" m="0" l="1" t="0" i="0" k="0" n="0" j="0"/>
    <Dimension name="area" m="0" l="2" t="0" i="0" k="0" n="0" j="0"/>
    <Dimension name="volume" m="0" l="3" t="0" i="0" k="0" n="0" j="0"/>
    <Dimension name="concentration" m="0" l="-3" t="0" i="0" k="0" n="1" j="0"/>
    <Dimension name="permeability" m="0" l="1" t="-1" i="0" k="0" n="0" j="0"/>
    <Dimension name="temperature" m="0" l="0" t="0" i="0" k="1" n="0" j="0"/>
    <Dimension name="idealGasConstantDims" m="1" l="2" t="-2" i="0" k="-1" n="-1" j="0"/>
    <Dimension name="none" m="0" l="0" t="0" i="0" k="0" n="0" j="0"/>
    <Dimension name="substance_dimension" m="0" l="0" t="0" i="0" k="0" n="1" j="0"/>
    <Dimension name="uM_dimension" m="3" l="0" t="0" i="0" k="0" n="1" j="0"/>
    <Dimension name="uM_sec_1_dimension" m="3" l="0" t="1" i="0" k="0" n="1" j="0"/>
    <Dimension name="sec_1_dimension" m="0" l="0" t="1" i="0" k="0" n="0" j="0"/>
    <Unit name="s" symbol="s" dimension="time" power="0" scale="1.0" offset="0.0"/>
    <Unit name="per_s" symbol="per_s" dimension="per_time" power="0" scale="1.0" offset="0.0"/>
    <Unit name="Hz" symbol="Hz" dimension="per_time" power="0" scale="1.0" offset="0.0"/>
    <Unit name="ms" symbol="ms" dimension="time" power="-3" scale="1.0" offset="0.0"/>
    <Unit name="per_ms" symbol="per_ms" dimension="per_time" power="3" scale="1.0" offset="0.0"/>
    <Unit name="m" symbol="m" dimension="length" power="0" scale="1.0" offset="0.0"/>
    <Unit name="cm" symbol="cm" dimension="length" power="-2" scale="1.0" offset="0.0"/>
    <Unit name="um" symbol="um" dimension="length" power="-6" scale="1.0" offset="0.0"/>
    <Unit name="m2" symbol="m2" dimension="area" power="0" scale="1.0" offset="0.0"/>
    <Unit name="cm2" symbol="cm2" dimension="area" power="-4" scale="1.0" offset="0.0"/>
    <Unit name="um2" symbol="um2" dimension="area" power="-12" scale="1.0" offset="0.0"/>
    <Unit name="m3" symbol="m3" dimension="volume" power="0" scale="1.0" offset="0.0"/>
    <Unit name="cm3" symbol="cm3" dimension="volume" power="-6" scale="1.0" offset="0.0"/>
    <Unit name="um3" symbol="um3" dimension="volume" power="-18" scale="1.0" offset="0.0"/>
    <Unit name="V" symbol="V" dimension="voltage" power="0" scale="1.0" offset="0.0"/>
    <Unit name="mV" symbol="mV" dimension="voltage" power="-3" scale="1.0" offset="0.0"/>
    <Unit name="per_V" symbol="per_V" dimension="per_voltage" power="0" scale="1.0" offset="0.0"/>
    <Unit name="per_mV" symbol="per_mV" dimension="per_voltage" power="3" scale="1.0" offset="0.0"/>
    <Unit name="ohm" symbol="ohm" dimension="resistance" power="0" scale="1.0" offset="0.0"/>
    <Unit name="Kohm" symbol="Kohm" dimension="resistance" power="3" scale="1.0" offset="0.0"/>
    <Unit name="Mohm" symbol="Mohm" dimension="resistance" power="6" scale="1.0" offset="0.0"/>
    <Unit name="S" symbol="S" dimension="conductance" power="0" scale="1.0" offset="0.0"/>
    <Unit name="mS" symbol="mS" dimension="conductance" power="-3" scale="1.0" offset="0.0"/>
    <Unit name="uS" symbol="uS" dimension="conductance" power="-6" scale="1.0" offset="0.0"/>
    <Unit name="nS" symbol="nS" dimension="conductance" power="-9" scale="1.0" offset="0.0"/>
    <Unit name="pS" symbol="pS" dimension="conductance" power="-12" scale="1.0" offset="0.0"/>
    <Unit name="S_per_m2" symbol="S_per_m2" dimension="conductanceDensity" power="0" scale="1.0" offset="0.0"/>
    <Unit name="mS_per_cm2" symbol="mS_per_cm2" dimension="conductanceDensity" power="1" scale="1.0" offset="0.0"/>
    <Unit name="S_per_cm2" symbol="S_per_cm2" dimension="conductanceDensity" power="4" scale="1.0" offset="0.0"/>
    <Unit name="F" symbol="F" dimension="capacitance" power="0" scale="1.0" offset="0.0"/>
    <Unit name="uF" symbol="uF" dimension="capacitance" power="-6" scale="1.0" offset="0.0"/>
    <Unit name="nF" symbol="nF" dimension="capacitance" power="-9" scale="1.0" offset="0.0"/>
    <Unit name="pF" symbol="pF" dimension="capacitance" power="-12" scale="1.0" offset="0.0"/>
    <Unit name="F_per_m2" symbol="F_per_m2" dimension="specificCapacitance" power="0" scale="1.0" offset="0.0"/>
    <Unit name="uF_per_cm2" symbol="uF_per_cm2" dimension="specificCapacitance" power="-2" scale="1.0" offset="0.0"/>
    <Unit name="ohm_m" symbol="ohm_m" dimension="resistivity" power="0" scale="1.0" offset="0.0"/>
    <Unit name="kohm_cm" symbol="kohm_cm" dimension="resistivity" power="-1" scale="1.0" offset="0.0"/>
    <Unit name="C" symbol="C" dimension="charge" power="0" scale="1.0" offset="0.0"/>
    <Unit name="C_per_mol" symbol="C_per_mol" dimension="charge_per_mole" power="0" scale="1.0" offset="0.0"/>
    <Unit name="A" symbol="A" dimension="current" power="0" scale="1.0" offset="0.0"/>
    <Unit name="uA" symbol="uA" dimension="current" power="-6" scale="1.0" offset="0.0"/>
    <Unit name="nA" symbol="nA" dimension="current" power="-9" scale="1.0" offset="0.0"/>
    <Unit name="pA" symbol="pA" dimension="current" power="-12" scale="1.0" offset="0.0"/>
    <Unit name="A_per_m2" symbol="A_per_m2" dimension="currentDensity" power="0" scale="1.0" offset="0.0"/>
    <Unit name="uA_per_cm2" symbol="uA_per_cm2" dimension="currentDensity" power="-2" scale="1.0" offset="0.0"/>
    <Unit name="mA_per_cm2" symbol="mA_per_cm2" dimension="currentDensity" power="1" scale="1.0" offset="0.0"/>
    <Unit name="mol_per_m3" symbol="mol_per_m3" dimension="concentration" power="0" scale="1.0" offset="0.0"/>
    <Unit name="mol_per_cm3" symbol="mol_per_cm3" dimension="concentration" power="6" scale="1.0" offset="0.0"/>
    <Unit name="M" symbol="M" dimension="concentration" power="3" scale="1.0" offset="0.0"/>
    <Unit name="mM" symbol="mM" dimension="concentration" power="0" scale="1.0" offset="0.0"/>
    <Unit name="m_per_s" symbol="m_per_s" dimension="permeability" power="0" scale="1.0" offset="0.0"/>
    <Unit name="cm_per_s" symbol="cm_per_s" dimension="permeability" power="-2" scale="1.0" offset="0.0"/>
    <Unit name="degC" symbol="degC" dimension="temperature" power="0" scale="1.0" offset="273.15"/>
    <Unit name="K" symbol="K" dimension="temperature" power="0" scale="1.0" offset="0.0"/>
    <Unit name="J_per_K_per_mol" symbol="J_per_K_per_mol" dimension="idealGasConstantDims" power="0" scale="1.0" offset="0.0"/>
    <Unit name="none" symbol="none" dimension="none" power="0" scale="1.0" offset="0.0"/>
    <Unit name="substance_unit" symbol="substance_unit" dimension="substance_dimension" power="0" scale="1.0" offset="0.0"/>
    <Unit name="uM_unit" symbol="uM_unit" dimension="uM_dimension" power="-3" scale="1.0" offset="0.0"/>
    <Unit name="uM_sec_1_unit" symbol="uM_sec_1_unit" dimension="uM_sec_1_dimension" power="-3" scale="1.0" offset="0.0"/>
    <Unit name="sec_1_unit" symbol="sec_1_unit" dimension="sec_1_dimension" power="0" scale="1.0" offset="0.0"/>
    <ComponentType name="Display" standalone="false">
        <Parameter name="xmin" dimension="none"/>
        <Parameter name="xmax" dimension="none"/>
        <Parameter name="ymin" dimension="none"/>
        <Parameter name="ymax" dimension="none"/>
        <Parameter name="timeScale" dimension="time"/>
        <Children name="lines" type="Line"/>
        <Simulation idCounter="0">
            <DataDisplay title="title" dataRegion="xmin,xmax,ymin,ymax"/>
        </Simulation>
        <Text name="title"/>
    </ComponentType>
    <ComponentType name="Line" standalone="false">
        <Parameter name="scale" dimension="*"/>
        <Parameter name="timeScale" dimension="*"/>
        <Simulation idCounter="0">
            <Record quantity="quantity" timeScale="timeScale" scale="scale" color="color"/>
        </Simulation>
        <Path name="quantity"/>
        <Text name="color"/>
    </ComponentType>
    <ComponentType name="Simulation" standalone="false">
        <Parameter name="length" dimension="time"/>
        <Parameter name="step" dimension="time"/>
        <Children name="displays" type="Display"/>
        <Children name="outputs" type="OutputFile"/>
        <ComponentReference name="target" type="Component" isAny="true"/>
        <Dynamics simultaneous="false">
            <StateVariable name="t" dimension="time"/>
        </Dynamics>
        <Simulation idCounter="0">
            <Run component="target" variable="t" increment="step" total="length"/>
        </Simulation>
    </ComponentType>
    <ComponentType name="OutputFile" standalone="false">
        <Children name="outputColumn" type="OutputColumn"/>
        <Simulation idCounter="0">
            <DataWriter path="path" fileName="fileName"/>
        </Simulation>
        <Text name="path"/>
        <Text name="fileName"/>
    </ComponentType>
    <ComponentType name="OutputColumn" standalone="false">
        <Simulation idCounter="0">
            <Record quantity="quantity"/>
        </Simulation>
        <Path name="quantity"/>
    </ComponentType>
    <ComponentType name="Lavrentovich2008_Ca_Oscillations" standalone="false">
        <Parameter name="vin" dimension="none"/>
        <Parameter name="kout" dimension="none"/>
        <Parameter name="vM3" dimension="none"/>
        <Parameter name="k_CaA" dimension="none"/>
        <Parameter name="n" dimension="none"/>
        <Parameter name="k_CaI" dimension="none"/>
        <Parameter name="m" dimension="none"/>
        <Parameter name="kip3" dimension="none"/>
        <Parameter name="vM2" dimension="none"/>
        <Parameter name="k2" dimension="none"/>
        <Parameter name="kf" dimension="none"/>
        <Parameter name="vp" dimension="none"/>
        <Parameter name="kp" dimension="none"/>
        <Parameter name="kdeg" dimension="none"/>
        <Exposure name="X" dimension="none"/>
        <Exposure name="Y" dimension="none"/>
        <Exposure name="Z" dimension="none"/>
        <Dynamics simultaneous="false">
            <DerivedVariable name="rate__R1" dimension="none" required="true" value="(compartment*vin)"/>
            <DerivedVariable name="rate__R2" dimension="none" required="true" value="(compartment*kout* (X/compartment) )"/>
            <DerivedVariable name="rate__R3" dimension="none" required="true" value="(ER*4*vM3*k_CaA^n* (X/compartment) ^n/(( (X/compartment) ^n+k_CaA^n)*( (X/compartment) ^n+k_CaI^n))* (Z/compartment) ^m/( (Z/compartment) ^m+kip3^m)*( ( (Y/ER) /ER) - (X/compartment) ))"/>
            <DerivedVariable name="rate__R4" dimension="none" required="true" value="(compartment*vM2* (X/compartment) ^2/( (X/compartment) ^2+k2^2))"/>
            <DerivedVariable name="rate__R5" dimension="none" required="true" value="(ER*kf*( ( (Y/ER) /ER) - (X/compartment) ))"/>
            <DerivedVariable name="rate__R6" dimension="none" required="true" value="(compartment*vp* (X/compartment) ^2/( (X/compartment) ^2+kp^2))"/>
            <DerivedVariable name="rate__R7" dimension="none" required="true" value="(compartment*kdeg* (Z/compartment) )"/>
            <StateVariable name="X" dimension="none" exposure="X"/>
            <StateVariable name="Y" dimension="none" exposure="Y"/>
            <StateVariable name="Z" dimension="none" exposure="Z"/>
            <TimeDerivative variable="Y" value="tscale * (-1*rate__R3 + rate__R4 - rate__R5) "/>
            <TimeDerivative variable="X" value="tscale * (rate__R1 - rate__R2 + rate__R3 - rate__R4 + rate__R5) "/>
            <TimeDerivative variable="Z" value="tscale * (rate__R6 - rate__R7) "/>
            <OnStart>
                <StateAssignment variable="X" value="init_X"/>
                <StateAssignment variable="Y" value="init_Y"/>
                <StateAssignment variable="Z" value="init_Z"/>
            </OnStart>
        </Dynamics>
        <Constant name="compartment" value="1.0 " dimension="none"/>
        <Constant name="ER" value="1.0 " dimension="none"/>
        <Constant name="init_X" value="0.1 " dimension="none"/>
        <Constant name="init_Y" value="1.5 " dimension="none"/>
        <Constant name="init_Z" value="0.1 " dimension="none"/>
        <Constant name="tscale" value="1per_s" dimension="per_time"/>
    </ComponentType>
    <Lavrentovich2008_Ca_Oscillations id="Lavrentovich2008_Ca_Oscillations_0" vin="0.05" kout="0.5" vM3="40.0" k_CaA="0.15" n="2.02" k_CaI="0.15" m="2.2" kip3="0.1" vM2="15.0" k2="0.1" kf="0.5" vp="0.05" kp="0.3" kdeg="0.08"/>
    <Simulation id="sim1" target="Lavrentovich2008_Ca_Oscillations_0" length="1000.0s" step="0.01s">
        <Display id="disp1" timeScale="1s" title="Simulation of SBML model: Lavrentovich2008_Ca_Oscillations from file: BIOMD0000000184.xml" xmin="0" xmax="1000.0" ymin="0.001" ymax="0">
            <Line id="ls_X" scale="1" quantity="X" color="#000000" timeScale="1s"/>
            <Line id="ls_Y" scale="1" quantity="Y" color="#ff0000" timeScale="1s"/>
            <Line id="ls_Z" scale="1" quantity="Z" color="#00ff00" timeScale="1s"/>
        </Display>
        <OutputFile id="outputFile1" fileName="Lavrentovich2008_Ca_Oscillations.dat" path=".">
            <OutputColumn id="os_X" quantity="X"/>
            <OutputColumn id="os_Y" quantity="Y"/>
            <OutputColumn id="os_Z" quantity="Z"/>
        </OutputFile>
    </Simulation>
    <Target component="sim1"/>
</Lems>
